# OpenSim document version 30516
Model arm26_optimize:
  gravity: 0 -9.80665 0
  publications: .
  length_units: meters
  force_units: N
  credits:
    The OpenSim Development Team (Reinbolt, J; Seth, A; Habib, A; Hamner, S) adapted from a model originally created by Kate Holzbaur (11/22/04) Hamner removed wrapping surfaces for improved performance. License: Creative Commons (CCBY 3.0). You are free to distribute, remix, tweak, and build upon this work, even commercially, as long as you credit us for the original creation. http://creativecommons.org/licenses/by/3.0/
  Ground: meshes=(ground_ribs.vtp ground_spine.vtp ground_skull.vtp ground_jaw.vtp ground_r_clavicle.vtp ground_r_scapula.vtp)
  BodySet:
    Body r_humerus: mass=1.864572 [kg] mass_center=(0 -0.180496 0) inertia=(0.01481 0.004551 0.013193 0 0 0)
        meshes=arm_r_humerus.vtp
    Body r_ulna_radius_hand: mass=1.534315 mass_center=(0 -0.181479 0) inertia=(0.019281 0.001571 0.020062 0 0 0)
        meshes=(arm_r_ulna.vtp arm_r_radius.vtp arm_r_lunate.vtp arm_r_scaphoid.vtp arm_r_pisiform.vtp arm_r_triquetrum.vtp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)
  JointSet:
    CustomJoint r_shoulder: socket_parent_frame_connectee_name=ground_offset
        socket_child_frame_connectee_name=../r_humerus
      Coordinate r_shoulder_elev: default_value=0.01122247 range=(-1.570796 3.141593) clamped=false
      PhysicalOffsetFrame ground_offset: socket_parent_connectee_name=../../ground
          translation=(-0.017545 -0.007 0.17) [meters]
      SpatialTransform: axes_held_at_zero=(rotation1 rotation2 translation1 translation2 translation3)
        TransformAxis rotation3: coordinates=r_shoulder_elev axis=(-0.05889802 0.0023 0.9982614)
            LinearFunction(coefficients=1 0)
    CustomJoint r_elbow: socket_parent_frame_connectee_name=r_humerus_offset
        socket_child_frame_connectee_name=../r_ulna_radius_hand
      Coordinate r_elbow_flex: default_value=0.8913571 range=(0 2.268928) clamped=false
      PhysicalOffsetFrame r_humerus_offset: socket_parent_connectee_name=../../r_humerus
          translation=(0.0061 -0.2904 -0.0123)
      SpatialTransform: axes_held_at_zero=(rotation1 rotation2 translation1 translation2 translation3)
        TransformAxis rotation3: coordinates=r_elbow_flex axis=(0.04940001 0.03660001 0.9981083)
            LinearFunction(coefficients=1 0)
  ForceSet:
    Thelen2003Muscle [values shared by the 6 below unless stated]: optimal_force=1 max_contraction_velocity=10
        FmaxTendonStrain=0.033 FmaxMuscleStrain=0.6 KshapeActive=0.5 KshapePassive=4 Af=0.3 Flen=1.8
        activation_time_constant=0.01 [seconds] deactivation_time_constant=0.04 [seconds]
    Thelen2003Muscle TRIlong: max_isometric_force=798.52 optimal_fiber_length=0.134 tendon_slack_length=0.143
        pennation_angle_at_optimal=0.2094395 [radians]
      PathPoint P1: socket_parent_frame_connectee_name=../../../ground (-0.05365 -0.01373 0.14723)
      PathPoint P2: socket_parent_frame_connectee_name=../../../r_humerus (-0.02714 -0.11441 -0.00664)
      PathPoint P3: socket_parent_frame_connectee_name=../../../r_humerus (-0.03184 -0.22637 -0.01217)
      PathPoint P4: socket_parent_frame_connectee_name=../../../r_humerus (-0.01743 -0.26757 -0.01208)
      PathPoint P5: socket_parent_frame_connectee_name=../../../r_ulna_radius_hand (-0.0219 0.01046 -0.00078)
    Thelen2003Muscle TRIlat: max_isometric_force=624.3 optimal_fiber_length=0.1138 tendon_slack_length=0.098
        pennation_angle_at_optimal=0.1570796
      PathPoint P1: socket_parent_frame_connectee_name=../../../r_humerus (-0.00599 -0.12646 0.00428)
      PathPoint P2: socket_parent_frame_connectee_name=../../../r_humerus (-0.02344 -0.14528 0.00928)
      PathPoint P3: socket_parent_frame_connectee_name=../../../r_humerus (-0.03184 -0.22637 -0.01217)
      PathPoint P4: socket_parent_frame_connectee_name=../../../r_humerus (-0.01743 -0.26757 -0.01208)
      PathPoint P5: socket_parent_frame_connectee_name=../../../r_ulna_radius_hand (-0.0219 0.01046 -0.00078)
    Thelen2003Muscle TRImed: max_isometric_force=624.3 optimal_fiber_length=0.1138 tendon_slack_length=0.0908
        pennation_angle_at_optimal=0.1570796
      PathPoint P1: socket_parent_frame_connectee_name=../../../r_humerus (-0.00838 -0.13695 -0.00906)
      PathPoint P2: socket_parent_frame_connectee_name=../../../r_humerus (-0.02601 -0.15139 -0.0108)
      PathPoint P3: socket_parent_frame_connectee_name=../../../r_humerus (-0.03184 -0.22637 -0.01217)
      PathPoint P4: socket_parent_frame_connectee_name=../../../r_humerus (-0.01743 -0.26757 -0.01208)
      PathPoint P5: socket_parent_frame_connectee_name=../../../r_ulna_radius_hand (-0.0219 0.01046 -0.00078)
    Thelen2003Muscle BIClong: max_isometric_force=624.3 optimal_fiber_length=0.1157 tendon_slack_length=0.2723
        pennation_angle_at_optimal=0
      PathPoint P1: socket_parent_frame_connectee_name=../../../ground (-0.039235 0.00347 0.14795)
      PathPoint P2: socket_parent_frame_connectee_name=../../../ground (-0.028945 0.01391 0.15639)
      PathPoint P3: socket_parent_frame_connectee_name=../../../r_humerus (0.02131 0.01793 0.01028)
      PathPoint P4: socket_parent_frame_connectee_name=../../../r_humerus (0.02378 -0.00511 0.01201)
      PathPoint P5: socket_parent_frame_connectee_name=../../../r_humerus (0.01345 -0.02827 0.00136)
      PathPoint P6: socket_parent_frame_connectee_name=../../../r_humerus (0.01068 -0.07736 -0.00165)
      PathPoint P7: socket_parent_frame_connectee_name=../../../r_humerus (0.01703 -0.12125 0.00024)
      PathPoint P8: socket_parent_frame_connectee_name=../../../r_humerus (0.0228 -0.1754 -0.0063)
      PathPoint P9: socket_parent_frame_connectee_name=../../../r_ulna_radius_hand (0.00751 -0.04839 0.02179)
    Thelen2003Muscle BICshort: max_isometric_force=435.56 optimal_fiber_length=0.1321 tendon_slack_length=0.1923
        pennation_angle_at_optimal=0
      PathPoint P1: socket_parent_frame_connectee_name=../../../ground (0.004675 -0.01231 0.13475)
      PathPoint P2: socket_parent_frame_connectee_name=../../../ground (-0.007075 -0.04004 0.14507)
      PathPoint P3: socket_parent_frame_connectee_name=../../../r_humerus (0.01117 -0.07576 -0.01101)
      PathPoint P4: socket_parent_frame_connectee_name=../../../r_humerus (0.01703 -0.12125 -0.01079)
      PathPoint P5: socket_parent_frame_connectee_name=../../../r_humerus (0.0228 -0.1754 -0.0063)
      PathPoint P6: socket_parent_frame_connectee_name=../../../r_ulna_radius_hand (0.00751 -0.04839 0.02179)
    Thelen2003Muscle BRA: max_isometric_force=987.26 optimal_fiber_length=0.0858 tendon_slack_length=0.0535
        pennation_angle_at_optimal=0
      PathPoint P1: socket_parent_frame_connectee_name=../../../r_humerus (0.0068 -0.1739 -0.0036)
      PathPoint P2: socket_parent_frame_connectee_name=../../../r_ulna_radius_hand (-0.0032 -0.0239 0.0009)
    CoordinateLimitForce r_shoulder_limit: coordinate=r_shoulder_elev upper_stiffness=20 [N*m/degree]
        upper_limit=180 [degrees] lower_stiffness=20 [N*m/degree] lower_limit=-90 [degrees] damping=0.25
        transition=10 [degrees]
    CoordinateLimitForce r_elbow_limit: coordinate=r_elbow_flex upper_stiffness=20 upper_limit=130 lower_stiffness=20
        lower_limit=0 damping=0.25 transition=10
  MarkerSet:
    Marker r_acromion: socket_parent_frame_connectee_name=../ground (-0.01256 0.04 0.17)
    Marker r_humerus_epicondyle: socket_parent_frame_connectee_name=../r_humerus (0.005 -0.2904 0.03)
    Marker r_radius_styloid: socket_parent_frame_connectee_name=../r_ulna_radius_hand (-0.0011 -0.23559 0.0943)
